# Solenoid
# 0,0 - node 643
x_1 := 0.0
y_1 := 10.5
z_1 := 0.0
A := [x_1; y_1; z_1] = [0; 10.5; 0]
# 1,0 - node 3655
x_2 := 0.0
y_2 := 10.433978
z_2 := 1.175627
B := [x_2; y_2; z_2] = [0; 10.434; 1.17563]
# 0,1 - node 3646
x_3 := 1.083333
y_3 := 10.5
z_3 := 0.0
C := [x_3; y_3; z_3] = [1.08333; 10.5; 0]
# 1,1 - node 3826
x_4 := 1.0833
y_4 := 10.433978
z_4 := 1.175627
D := [x_4; y_4; z_4] = [1.0833; 10.434; 1.17563]
21*(A + B)/2/|(A + B)/2| = [0; 20.967; 1.17748]
x_3/2 = 0.541667
